# Pure Si crystal, structure created by LAMMPS, qeq off

units		metal
atom_style	charge
dimension       3
boundary        p p p

read_data	data.sio40.0
pair_style	comb
pair_coeff	* * ffield.new.0 O Si

neighbor	0.5 bin
neigh_modify	every 1 delay 1 check yes

fix		1 all nve
timestep        0.00020

thermo_style	custom step temp etotal pe evdwl ecoul press vol lx ly lz xz
thermo_modify	norm yes
velocity	all create 10.1 2398378
thermo	  	1

#dump		1 all cfg 10 *.cfg id type xs ys zs q vx vy vz fx fy fz
#dump_modify	1 append yes element Si

#dump		1 all image 10 image.*.jpg element element &
#		axes yes 0.8 0.02 view 60 -30
#dump_modify	1 pad 2 element Si

run  		10
